OpenVSP model (file version 4), 15 components.
Geometry view with OpenVSP parameter names; values to 6 digits, angles in degrees, lengths in the model's unit.
Overall bounding box: X_Min=-0.896505 X_Len=17.3005 Y_Min=-18.937 Y_Len=37.874 Z_Min=-5.15311 Z_Len=10.9632

Fuselage "FuselageGeom"
  location (X Y Z) 0 0 0, rotation 0 0 0
  bounding box size 16.404 3.36913 5.41339
  Design: Length=16.404
  cross sections:
    n  XLocPercent  YLocPercent  ZLocPercent  shape
    0  0            0            -0.0628571   point
    1  0.0359195    0            -0.0514286   ellipse Ellipse_Height=1.82721 Ellipse_Width=2.37642
    2  0.25         0            -0.0114943   ellipse Ellipse_Height=4.84421 Ellipse_Width=3.28084
    3  0.5          0            0            ellipse Ellipse_Height=5.41339 Ellipse_Width=3.28084
    4  0.758621     0            0.045977     ellipse Ellipse_Height=3.66985 Ellipse_Width=2.65617
    5  1            0            0.12         point

Wing "CanardGeom", child of "FuselageGeom"
  location (X Y Z) 0.901028 0 -1.26075, rotation 0 3 0; relative location 0.9 0 -1.3, rotation 0 3 0
  symmetric about XZ
  bounding box size 2.99665 30 0.469134
  totals: TotalSpan=30 TotalProjectedSpan=30 TotalChord=3 TotalArea=90
  root: chord 3, twist 0, NACA 4-series Camber=0.02 CamberLoc=0.2 ThickChord=0.15
  sections:
    n  Span  Root_Chord  Tip_Chord  Area  Sweep  Sweep_Location  Dihedral  Twist  Twist_Location  tip airfoil
    1  15    3           3          45    0      0               0         0      0.25            NACA 4-series Camber=0 CamberLoc=0.2 ThickChord=0.1

Custom "Disk", child of "CanardGeom"
  location (X Y Z) 0.152056 5.5 -1.2215, rotation 0 3 0; relative location -0.75 5.5 0, rotation 0 0 0
  bounding box size 0.412094 7.87402 7.86323
  Design: Diameter=7.87402
  custom script Disk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

Custom "Disk", child of "CanardGeom"
  location (X Y Z) 0.152056 15 -1.2215, rotation 0 3 0; relative location -0.75 15 0, rotation 0 0 0
  bounding box size 0.412094 7.87402 7.86323
  Design: Diameter=7.87402
  custom script Disk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

Fuselage "MotorGeom", child of "CanardGeom"
  location (X Y Z) -0.896505 15 -1.16654, rotation 0 3 0; relative location -1.8 15 0, rotation 0 0 0
  symmetric about XZ
  bounding box size 4.99315 30.7 0.873494
  Design: Length=5
  cross sections:
    n  XLocPercent  YLocPercent  ZLocPercent  shape
    0  0            0            0            point
    1  0.25         0            0            ellipse Ellipse_Height=0.7 Ellipse_Width=0.7
    2  0.5          0            0            as above
    3  0.75         0            0            as above
    4  1            0            0            point

Fuselage "MotorGeom", child of "CanardGeom"
  location (X Y Z) -0.896505 5.5 -1.16654, rotation 0 3 0; relative location -1.8 5.5 0, rotation 0 0 0
  symmetric about XZ
  bounding box size 4.99315 11.7 0.873494
  Design: Length=5
  cross sections:
    n  XLocPercent  YLocPercent  ZLocPercent  shape
    0  0            0            0            point
    1  0.25         0            0            ellipse Ellipse_Height=0.7 Ellipse_Width=0.7
    2  0.5          0            0            as above
    3  0.75         0            0            as above
    4  1            0            0            point

Custom "Disk", child of "CanardGeom"
  location (X Y Z) 0.152056 -5.5 -1.2215, rotation 0 3 0; relative location -0.75 -5.5 0, rotation 0 0 0
  bounding box size 0.412094 7.87402 7.86323
  Design: Diameter=7.87402
  custom script Disk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

Custom "Disk", child of "CanardGeom"
  location (X Y Z) 0.152056 -15 -1.2215, rotation 0 3 0; relative location -0.75 -15 0, rotation 0 0 0
  bounding box size 0.412094 7.87402 7.86323
  Design: Diameter=7.87402
  custom script Disk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

Wing "WingGeom", child of "FuselageGeom"
  location (X Y Z) 12.001 0 1.83925, rotation 0 3 0; relative location 12 0 1.8, rotation 0 3 0
  symmetric about XZ
  bounding box size 2.99665 30 0.469134
  totals: TotalSpan=30 TotalProjectedSpan=30 TotalChord=3 TotalArea=90
  root: chord 3, twist 0, NACA 4-series Camber=0.02 CamberLoc=0.2 ThickChord=0.15
  sections:
    n  Span  Root_Chord  Tip_Chord  Area  Sweep  Sweep_Location  Dihedral  Twist  Twist_Location  tip airfoil
    1  15    3           3          45    0      0               0         0      0.25            NACA 4-series Camber=0 CamberLoc=0.2 ThickChord=0.1
  SS_Control "WingAilerons": UStart=0.5 UEnd=0.62 Length_C_Start=0.3 Length_C_End=0.3 Length_Start=0.9 Length_End=0.9 LE_Flag=0 Surf_Type=2

Custom "Disk", child of "WingGeom"
  location (X Y Z) 11.2521 5.5 1.8785, rotation 0 3 0; relative location -0.75 5.5 0, rotation 0 0 0
  bounding box size 0.412094 7.87402 7.86323
  Design: Diameter=7.87402
  custom script Disk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

Custom "Disk", child of "WingGeom"
  location (X Y Z) 11.2521 15 1.8785, rotation 0 3 0; relative location -0.75 15 0, rotation 0 0 0
  bounding box size 0.412094 7.87402 7.86323
  Design: Diameter=7.87402
  custom script Disk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

Fuselage "MotorGeom", child of "WingGeom"
  location (X Y Z) 10.2035 15 1.93346, rotation 0 3 0; relative location -1.8 15 0, rotation 0 0 0
  symmetric about XZ
  bounding box size 4.99315 30.7 0.873494
  Design: Length=5
  cross sections:
    n  XLocPercent  YLocPercent  ZLocPercent  shape
    0  0            0            0            point
    1  0.25         0            0            ellipse Ellipse_Height=0.7 Ellipse_Width=0.7
    2  0.5          0            0            as above
    3  0.75         0            0            as above
    4  1            0            0            point

Fuselage "MotorGeom", child of "WingGeom"
  location (X Y Z) 10.2035 5.5 1.93346, rotation 0 3 0; relative location -1.8 5.5 0, rotation 0 0 0
  symmetric about XZ
  bounding box size 4.99315 11.7 0.873494
  Design: Length=5
  cross sections:
    n  XLocPercent  YLocPercent  ZLocPercent  shape
    0  0            0            0            point
    1  0.25         0            0            ellipse Ellipse_Height=0.7 Ellipse_Width=0.7
    2  0.5          0            0            as above
    3  0.75         0            0            as above
    4  1            0            0            point

Custom "Disk", child of "WingGeom"
  location (X Y Z) 11.2521 -5.5 1.8785, rotation 0 3 0; relative location -0.75 -5.5 0, rotation 0 0 0
  bounding box size 0.412094 7.87402 7.86323
  Design: Diameter=7.87402
  custom script Disk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

Custom "Disk", child of "WingGeom"
  location (X Y Z) 11.2521 -15 1.8785, rotation 0 3 0; relative location -0.75 -15 0, rotation 0 0 0
  bounding box size 0.412094 7.87402 7.86323
  Design: Diameter=7.87402
  custom script Disk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

Advanced link "Unnamed_Link"


VSPAERO settings: Sref=180 bref=30 cref=3 Xcg=0 Ycg=0 Zcg=0 AlphaStart=1 AlphaEnd=10 AlphaNpts=2 BetaStart=0 BetaEnd=20 BetaNpts=2 MachStart=0.134 MachEnd=0.22 MachNpts=2 ReCref=1e+07 Vinf=150 Rho=0.002377
  control group "Port Wing Aileron": DeflectionAngle=3
  control group "Starboard Wing Aileron": DeflectionAngle=10
